Simulations: Version=216
  Simulation Clay Fellow
    Clock: Start=2024-01-01; End=2024-12-31
    Summary
    Weather: FileName=w_id_434_3.met
    SoilArbitrator
    MicroClimate: a_interception=0; b_interception=1; c_interception=0; d_interception=0; SoilHeatFluxFraction=0.4; MinimumHeightDiffForNewLayer=0; NightInterceptionFraction=0.5; ReferenceHeight=2
    Zone Field: Area=1; Slope=0; AspectAngle=0; Altitude=50
      Report: EventNames=[Clock].EndOfDay
        VariableNames:
          [Clock].Today as date
          [Maize].IsAlive as maize_alive
          [Maize].LAI as maize_leaf_area_index
          [Maize].Leaf.Total.Wt as maize_leaf
          [Maize].Stem.Total.Wt as maize_stem
          [Maize].Root.Total.Wt as maize_root
          [Maize].Phenology.CurrentPhaseName as maize_phenology_stage
          [soybean].IsAlive as soybean_alive
          [soybean].LAI as soybean__leaf_area_index
          [soybean].Leaf.Total.Wt as soybean_leaf
          [soybean].Stem.Total.Wt as soybean_stem
          [soybean].Root.Total.Wt as soybean_root
          [soybean].Phenology.CurrentPhaseName as soybean_phenology
          [soybean].Grain.Total.Wt*10 as soybean_yield_kg_ha
          [Maize].Grain.Total.Wt*10 as maize_yield_kg_ha
          [NFlow].NLoss as nloss
          [NFlow].N2Oatm as n2oatm
          [ISoilWater].LeachNO3 as leachno3
          [ISoilWater].LeachNH4 as leachnh4
          [ISoilWater].WaterTable as water_table
          [Soil].SoilWater.Drainage as drainage
          [Soil].SoilWater.Es as es
      SurfaceOrganicMatter: InitialResidueName=soybean; InitialResidueType=soybean; InitialResidueMass=2000; InitialStandingFraction=0; InitialCPR=0; InitialCNR=20
      Plant Maize
        Cultivar A_110_Indiana
          Command:
            [Phenology].Juvenile.Target.FixedValue = 230
            [Phenology].Photosensitive.Target.XYPairs.X = 0, 12.5, 24
            [Phenology].Photosensitive.Target.XYPairs.Y = 0, 0, 0
            [Phenology].FlagLeafToFlowering.Target.FixedValue = 1
            [Phenology].FloweringToGrainFilling.Target.FixedValue = 170
            [Phenology].GrainFilling.Target.FixedValue = 700
            [Phenology].Maturing.Target.FixedValue = 1
            [Phenology].MaturityToHarvestRipe.Target.FixedValue = 100
            [Cob].DMDemands.Structural.DMDemandFunction.MaximumOrganWt.FixedValue = 36
            [Leaf].Photosynthesis.RUE.FixedValue=1.55
      Plant soybean: ResourceName=Soybean
      Fertiliser
      Soil: SoilType=242963; Region=Champaign; State=Illinois; Country=USA; ApsoilNumber=1; Latitude=40.12; Longitude=-88.19; DataSource=ssurgo2apsim
        Comments=This soil was created with data from SSURGO Database, downloaded in R via the FedData package and parameters set using the approach described by Archontoulis et al. (2014, Agron. J. 106(3):1025-1040). This soil type represents
        Physical: Rocks=[0, 0, 0, 0, 0, 0]
          Thickness  ParticleSizeSand  ParticleSizeSilt  ParticleSizeClay  BD      AirDry   LL15   DUL       SAT       KS
          50         16                43                41                1.59    0.2151   0.239  0.356     0.397727  2.89397
          50         16                43                41                1.59    0.2151   0.239  0.356     0.397727  2.89397
          50         16                43                41                1.59    0.2151   0.239  0.356     0.397727  2.89397
          50         16                43                41                1.59    0.2151   0.239  0.356     0.397727  2.89397
          200        15                39                46                1.8     0.255    0.255  0.318182  0.318182  2.32916
          200        15                39                46                1.8     0.255    0.255  0.318182  0.318182  2.32916
          200        15                39                46                1.8     0.255    0.255  0.318182  0.318182  2.32916
          200        15.3              39.4              45.3              1.799   0.2543   0.254  0.318561  0.318561  2.4002
          500        18                43                39                1.79    0.248    0.248  0.32197   0.32197   3.03962
          500        21.84             40.12             38.04             1.7996  0.24992  0.25   0.272079  0.318333  0.536451
          Rocks source: Calculated
          SoilCrop MaizeSoil
            LL=[0.239, 0.239, 0.239, 0.239, 0.255, 0.255, 0.255, 0.2543, 0.248, 0.24992]
            KL=[0.08, 0.08, 0.08, 0.08, 0.0595496, 0.0595496, 0.0595496, 0.0573464, 0.0375176, 0.0264411]
            XF=[1, 1, 1, 1, 1, 1, 1, 1, 1, 1]
          SoilCrop SoybeanSoil: same as Clay Fellow.Field.Soil.Physical.MaizeSoil
        Solute NO3: InitialValuesUnits=ppm; WaterTableConcentration=0; D0=0; DepthConstant=0; MaxDepthSoluteAccessible=0; RunoffEffectivenessAtMovingSolute=0; MaxEffectiveRunoff=0
          Thickness  InitialValues  Exco  FIP
          50         7.33675        0     1
          50         0.573281       0     1
          50         2.96009        0     1
          50         5.91094        0     1
          200        6.79933        0     1
          200        6.99338        0     1
          200        4.54943        0     1
          200        2.63949        0     1
          500        0.278322       0     1
          500        5.89755        0     1
        Solute NH4: InitialValuesUnits=ppm; WaterTableConcentration=0; D0=0; DepthConstant=0; MaxDepthSoluteAccessible=0; RunoffEffectivenessAtMovingSolute=0; MaxEffectiveRunoff=0
          Thickness  InitialValues  Exco  FIP
          50         0              0     1
          50         0              0     1
          50         0              0     1
          50         0              0     1
          200        0              0     1
          200        0              0     1
          200        0              0     1
          200        0              0     1
          500        0              0     1
          500        0              0     1
        Solute Urea: InitialValuesUnits=kg/ha; WaterTableConcentration=0; D0=0; DepthConstant=0; MaxDepthSoluteAccessible=0; RunoffEffectivenessAtMovingSolute=0; MaxEffectiveRunoff=0
          Thickness  InitialValues  Exco  FIP
          50         0              0     1
          50         0              0     1
          50         0              0     1
          50         0              0     1
          200        0              0     1
          200        0              0     1
          200        0              0     1
          200        0              0     1
          500        0              0     1
          500        0              0     1
        Organic: FOMCNRatio=45; CarbonUnits=Total
          Thickness  Carbon    SoilCNRatio  FBiom  FInert  FOM
          50         2.84884   13           0.03   0.5     40
          50         2.84884   13           0.025  0.55    40
          50         2.84884   13           0.02   0.6     40
          50         2.84884   13           0.015  0.75    40
          200        0.581395  13           0.015  0.8     40
          200        0.581395  13           0.01   0.85    40
          200        0.581395  13           0.005  0.9     40
          200        0.56686   13           0.001  0.95    40
          500        0.436047  13           0.001  0.97    40
          500        0.156977  13           0.001  0.99    40
        Chemical: PHUnits=Water
          Thickness  PH    CEC
          50         7.41  2.84884
          50         7.41  2.84884
          50         7.41  2.84884
          50         7.41  2.84884
          200        7.41  0.581395
          200        7.41  0.581395
          200        7.41  0.581395
          200        7.41  0.56686
          500        7.41  0.436047
          500        7.41  0.156977
        Water: Thickness=[50, 50, 50, 50, 200, 200, 200, 200, 500, 500]; FilledFromTop=false
          InitialValues=[0.356, 0.356, 0.356, 0.356, 0.318182, 0.318182, 0.318182, 0.318561, 0.32197, 0.272079]
        Nutrient
        SoilTemperature Temperature: InteractionsPerDay=8
        Swim3 Swim: Salb=0.13; CN2Bare=76; CNRed=20; CNCov=0.8; KDul=0.1; PSIDul=-100; VC=true; DTMin=0; DTMax=1440; MaxWaterIncrement=10; SpaceWeightingFactor=0; SoluteSpaceWeightingFactor=0; Dis=15; Disp=1; A=1; DTHC=0; DTHP=1; vcon1=7.28e-09; vcon2=7.26e-07; eo_time=06:00; eo_durn=720; default_rain_time=00:00; default_rain_duration=720; Diagnostics=false
          SwimSubsurfaceDrain: DrainDepth=920; DrainSpacing=15000; DrainRadius=100; Klat=1000; ImpermDepth=1800; Open=true
      Manager FertiliseSowing
        Crop = [Maize]
        FertiliserType = UreaN
        Amount = 300
        FertiliseDepth = 50
```csharp
using Models.Soils;
using System;
using System.Linq;
using Models.Core;
using Models.PMF;
namespace Models
{
    [Serializable]
    public class Script : Model
    {
        [Link] Clock Clock;
        [Link] Fertiliser Fertiliser;
        
        [Description("Crop to be fertilised")]
        public IPlant Crop { get; set; }

        [Description("Type of fertiliser to apply? ")] 
        [Display(Type = DisplayType.FertiliserType)]public string FertiliserType { get; set; }
    
        [Description("Amount of fertiliser to be applied (kg/ha)")]
        public double Amount { get; set; }
        
        [Description("Fertilise depth (mm)")]
        public double FertiliseDepth { get; set; }
        
        [EventSubscribe("Sowing")]
        private void OnSowing(object sender, EventArgs e)
        {
            Model crop = sender as Model;
            if (Crop != null && crop.Name.ToLower() == (Crop as IModel).Name.ToLower())
                Fertiliser.Apply(amount: Amount, type: FertiliserType, depth: FertiliseDepth);
        }
    }
}
```
      RotationManager: TopLevel=true; InitialState=initial; Verbose=true
        Nodes:
          ID  Name
          1   fallow
          2   Maize
          3   soybean
          4   initial
        Arcs:
          {SourceID=2, DestinationID=1, Conditions=[[MaizeManager].Script.CanHarvest], Actions=[[MaizeManager].Script.HarvestCrop("glable")], ID=5, Name=Arc 2}
          {SourceID=1, DestinationID=3, Conditions=[[soybeanManager].Script.CanSow], Actions=[[soybeanManager].Script.SowCrop()], ID=6, Name=Arc 3}
          {SourceID=4, DestinationID=2, Conditions=[[MaizeManager].Script.CanSow], Actions=[[MaizeManager].Script.SowCrop()], ID=8, Name=Arc 1}
          {SourceID=3, DestinationID=4, Conditions=[[soybeanManager].Script.CanHarvest], Actions=[[soybeanManager].Script.HarvestCrop("glable")], ID=7, Name=Arc 4}
      Manager MaizeManager
        Crop = [Maize]
        Verbose = True
        StartDate = 04-may
        EndDate = 18-may
        MinESW = 0
        MinRain = 20
        RainDays = 0
        MustSow = True
        CultivarName = A_110_Indiana
        SowingDepth = 50
        RowSpacing = 760
        Population = 9
```csharp
using APSIM.Numerics;
using Models.Climate;
using System.Linq;
using System;
using Models.Core;
using Models.PMF;
using Models.Soils;
using Models.Utilities;
using APSIM.Shared.Utilities;
using Models.Interfaces;

namespace Models
{
    [Serializable]
    public class Script : Model
    {
        [Link] private Clock Clock;
        [Link] private Summary Summary;
        [Link] private Soil Soil;
        private Accumulator accumulatedRain;
        [Link]
        private ISoilWater waterBalance;

        [Separator("Script Configuration")]
        [Description("Crop to manage")]
        public IPlant Crop { get; set; }
        [Description("Run script in verbose mode?")]
        [Tooltip("If enabled, the script will print a large number of diagnostics to the summary file, to aid debugging")]
        public bool Verbose { get; set; }

        [Separator("Sowing Conditions")]
        [Description("Start of sowing window (d-mmm)")]
        public string StartDate { get; set;}
        [Description("End of sowing window (d-mmm)")]
        public string EndDate { get; set;}
        [Description("Minimum extractable soil water for sowing (mm)")]
        public double MinESW { get; set;}
        [Description("Accumulated rainfall required for sowing (mm)")]
        public double MinRain { get; set;}
        [Description("Duration of rainfall accumulation (d)")]
        public int RainDays { get; set;}

        [Tooltip("If enabled, and if sowing conditions are not met, the crop will be sown on the final day of the sowing window.")]
        [Description("Must sow (yes/no)")]
        public bool MustSow { get; set;}
        [Separator("Sowing Properties")]
        [Description("Cultivar to be sown")]
        [Display(Type=DisplayType.CultivarName)]
        public string CultivarName { get; set;}
        [Description("Sowing depth (mm)")]
        public double SowingDepth { get; set;}        
        [Description("Row spacing (mm)")]
        public double RowSpacing { get; set;}    
        [Description("Plant population (/m2)")]
        public double Population { get; set;}    

        private bool afterInit = false;

        [EventSubscribe("StartOfSimulation")]
        private void OnSimulationCommencing(object sender, EventArgs e)
        {
            if (Crop == null) { throw new Exception("Crop must not be null in rotations"); }
            accumulatedRain = new Accumulator(this, "[Weather].Rain", RainDays);
            afterInit = true;
            Summary.WriteMessage(this, this.FullPath + " - Commence, crop=" + (Crop as Model).Name, MessageType.Diagnostic);
        }
        
        [EventSubscribe("DoManagement")]
        private void DoManagement(object sender, EventArgs e)
        {
            accumulatedRain.Update();
        }

        // Test whether we can sow a crop today
        // +ve number - yes
        // 0          - no
        // -ve number - no, out of scope (planting window)
        [Units("0-1")]
        public bool CanSow
        {
            get
            {
                if (!afterInit)
                    return false;
                bool isPossibleToday = false;
                bool inWindow = DateUtilities.WithinDates(StartDate, Clock.Today, EndDate);
                bool endOfWindow = DateUtilities.DatesEqual(EndDate, Clock.Today);
                if (! Crop.IsAlive && inWindow && accumulatedRain.Sum > MinRain && MathUtilities.Sum(waterBalance.ESW) > MinESW) 
                    isPossibleToday = true;

                   if (Verbose)
                {
                    if (isPossibleToday)
                        Summary.WriteMessage(this, "Sowing is possible today", MessageType.Diagnostic);
                    else if (!Crop.IsAlive && endOfWindow && MustSow)
                        Summary.WriteMessage(this, "Sowing is possible today, but conditions are not ideal. Only sowing because MustSow is set to yes", MessageType.Diagnostic);
                    else if (Crop.IsAlive)
                        Summary.WriteMessage(this, "Not sowing today because crop is already alive", MessageType.Diagnostic);
                    else if (!inWindow)
                        Summary.WriteMessage(this, string.Format("Not sowing today because current date ({0}) is not in sowing window ({1} - {2}).", Clock.Today.ToString("dd-MMM"), StartDate, EndDate), MessageType.Diagnostic);
                    else if (!(accumulatedRain.Sum > MinRain))
                        Summary.WriteMessage(this, string.Format("Not sowing today because accumulated rain ({0}) is less than min rain required for sowing ({1})", accumulatedRain.Sum, MinRain), MessageType.Diagnostic);
                    else if (!(MathUtilities.Sum(waterBalance.ESW) > MinESW))
                        Summary.WriteMessage(this, string.Format("Not sowing today because ESW ({0}) is less than min ESW required for sowing ({1})", MathUtilities.Sum(waterBalance.ESW), MinESW), MessageType.Diagnostic);
                }

               if (isPossibleToday)
                   return true;

               if (! Crop.IsAlive && endOfWindow && MustSow) 
                   return true;

               if (! Crop.IsAlive && !inWindow)
                   return false;

               return false;
            }
        }

        public void SowCrop()
        {
           Summary.WriteMessage(this, this.FullPath + " -  sowing " + (Crop as Model).Name, MessageType.Diagnostic);
           Crop.Sow(population:Population, cultivar:CultivarName, depth:SowingDepth, rowSpacing:RowSpacing);    
        }

        [Units("0-1")]
        public int CanHarvest
        {
           get
           {
             if (!afterInit)
                 return 0;
             return Crop.IsReadyForHarvesting ? 1 : 0;
           }
        }

        public void HarvestCrop(string msg)
        {
           Summary.WriteMessage(this, "Harvesting crop " + (Crop as IModel).Name + ". Message: " + msg, MessageType.Diagnostic);
           Crop.Harvest();
           Crop.EndCrop();
        }
    }
}
```
      Manager Tillage
        tillage_date = 26-apr
        surfaceommodule = SurfaceOrganicMatter
        tillage_type = disc
        tillage_depth = 150
        tillage_f_incorp = 0.4
```csharp
using Models.Soils;
using System;
using Models.Core;
using Models.PMF;
namespace Models
{
    [Serializable]
    [System.Xml.Serialization.XmlInclude(typeof(Model))]
    public class Script : Model
    {
        [Link] IClock Clock;

        [Description("Enter tillage date (dd-mmm) : ")]
        public string tillage_date { get; set; }

        [Description("Module used to apply the tillage : ")]
        public string surfaceommodule { get; set; }

        [Description("Tillage type : ")]
        public tillage_typeType tillage_type { get; set; }

        [Description("User_defined depth of seedbed preparation (mm) : ")]
        public string tillage_depth { get; set; }

        [Description("User_defined fraction of surface residues to incorporate (0-1): ")]
        public string tillage_f_incorp { get; set; }
        public enum tillage_typeType 
        {
            user_defined, chisel, disc, planter, burn, burn_90, graze, scarifier, rip, blade, tine
        }

        [EventSubscribe("DoManagement")]
        private void OnDoManagement(object sender, EventArgs e)
        {
            /*
                
         if (today = date('[tillage_date]') then
            if ('[tillage_type]' = 'user_defined') then
                '[surfaceommodule]' tillage type = [tillage_type], f_incorp = [tillage_f_incorp] (), tillage_depth = [tillage_depth]
            else
                '[surfaceommodule]' tillage type = [tillage_type]
            endif
            ready_to_till_pre_sow = 0
            till_day_pre_sow = 0
         endif
    
            */
        }
    }
}
```
      Manager soybeanManager
        Crop = [soybean]
        Verbose = True
        StartDate = 01-May
        EndDate = 24-May
        MinESW = 0
        MinRain = 0
        RainDays = 0
        MustSow = True
        CultivarName = Generic_MG4
        SowingDepth = 50
        RowSpacing = 760
        Population = 33
        script: same as in Clay Fellow.Field.MaizeManager
  DataStore
  Simulation Clay Fellow1
    Clock: Start=2024-01-01; End=2024-12-31
    Summary
    Weather: FileName=w_id_434_3.met
    SoilArbitrator
    MicroClimate: a_interception=0; b_interception=1; c_interception=0; d_interception=0; SoilHeatFluxFraction=0.4; MinimumHeightDiffForNewLayer=0; NightInterceptionFraction=0.5; ReferenceHeight=2
    Zone Field: Area=1; Slope=0; AspectAngle=0; Altitude=50
      Report: EventNames=[Clock].EndOfDay
        VariableNames:
          [Clock].Today as date
          [Maize].IsAlive as maize_alive
          [Maize].LAI as maize_leaf_area_index
          [Maize].Leaf.Total.Wt as maize_leaf
          [Maize].Stem.Total.Wt as maize_stem
          [Maize].Root.Total.Wt as maize_root
          [Maize].Phenology.CurrentPhaseName as maize_phenology_stage
          [soybean].IsAlive as soybean_alive
          [soybean].LAI as soybean__leaf_area_index
          [soybean].Leaf.Total.Wt as soybean_leaf
          [soybean].Stem.Total.Wt as soybean_stem
          [soybean].Root.Total.Wt as soybean_root
          [soybean].Phenology.CurrentPhaseName as soybean_phenology
          [soybean].Grain.Total.Wt*10 as soybean_yield_kg_ha
          [Maize].Grain.Total.Wt*10 as maize_yield_kg_ha
          [NFlow].NLoss as nloss
          [NFlow].N2Oatm as n2oatm
          [ISoilWater].LeachNO3 as leachno3
          [ISoilWater].LeachNH4 as leachnh4
          [ISoilWater].WaterTable as water_table
          [ISoilWater].Drainage as drainage
          [ISoilWater].Es as es
      SurfaceOrganicMatter: InitialResidueName=soybean; InitialResidueType=soybean; InitialResidueMass=2000; InitialStandingFraction=0; InitialCPR=0; InitialCNR=20
      Plant Maize: same as Clay Fellow.Field.Maize
      Plant soybean: ResourceName=Soybean
      Fertiliser
      Soil: SoilType=242963; Region=Champaign; State=Illinois; Country=USA; ApsoilNumber=1; Latitude=40.12; Longitude=-88.19; DataSource=ssurgo2apsim
        Comments=This soil was created with data from SSURGO Database, downloaded in R via the FedData package and parameters set using the approach described by Archontoulis et al. (2014, Agron. J. 106(3):1025-1040). This soil type represents
        Physical: Rocks=[0, 0, 0, 0, 0, 0]
          Thickness  ParticleSizeSand  ParticleSizeSilt  ParticleSizeClay  BD      AirDry   LL15   DUL    SAT    KS
          50         16                43                41                1.59    0.2151   0.239  0.356  0.398  2.89397
          50         16                43                41                1.59    0.2151   0.239  0.356  0.398  2.89397
          50         16                43                41                1.59    0.2151   0.239  0.356  0.398  2.89397
          50         16                43                41                1.59    0.2151   0.239  0.356  0.398  2.89397
          200        15                39                46                1.8     0.255    0.255  0.317  0.318  2.32916
          200        15                39                46                1.8     0.255    0.255  0.317  0.318  2.32916
          200        15                39                46                1.8     0.255    0.255  0.317  0.318  2.32916
          200        15.3              39.4              45.3              1.799   0.2543   0.254  0.318  0.319  2.4002
          500        18                43                39                1.79    0.248    0.248  0.321  0.322  3.03962
          500        21.84             40.12             38.04             1.7996  0.24992  0.25   0.272  0.318  0.536451
          Rocks source: Calculated
          SoilCrop MaizeSoil: same as Clay Fellow.Field.Soil.Physical.MaizeSoil
          SoilCrop SoybeanSoil: same as Clay Fellow.Field.Soil.Physical.MaizeSoil
        Solute NO3: same as Clay Fellow.Field.Soil.NO3
        Solute NH4: same as Clay Fellow.Field.Soil.NH4
        Solute Urea: same as Clay Fellow.Field.Soil.Urea
        Organic: same as Clay Fellow.Field.Soil.Organic
        Chemical: same as Clay Fellow.Field.Soil.Chemical
        Water: Thickness=[50, 50, 50, 50, 200, 200, 200, 200, 500, 500]; FilledFromTop=false
          InitialValues=[0.356, 0.356, 0.356, 0.356, 0.318182, 0.318182, 0.318182, 0.318561, 0.32197, 0.272079]
        Nutrient
        SoilTemperature Temperature: InteractionsPerDay=8
        Swim3 Swim: Salb=0.13; CN2Bare=76; CNRed=20; CNCov=0.8; KDul=0.1; PSIDul=-100; VC=true; DTMin=0; DTMax=60; MaxWaterIncrement=5; SpaceWeightingFactor=0.5; SoluteSpaceWeightingFactor=0; Dis=15; Disp=1; A=1; DTHC=0; DTHP=1; vcon1=7.28e-09; vcon2=7.26e-07; eo_time=06:00; eo_durn=720; default_rain_time=00:00; default_rain_duration=720; Diagnostics=false
          SwimSubsurfaceDrain: DrainDepth=920; DrainSpacing=15000; DrainRadius=100; Klat=1000; ImpermDepth=1800; Open=true
      Manager FertiliseSowing: same as Clay Fellow.Field.FertiliseSowing
      RotationManager: same as Clay Fellow.Field.RotationManager
      Manager MaizeManager: same as Clay Fellow.Field.MaizeManager
      Manager Tillage: same as Clay Fellow.Field.Tillage
      Manager soybeanManager: same as Clay Fellow.Field.soybeanManager
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